atom_style hybrid angle sphere
units si
processors	* * 1
comm_modify vel yes

region simulationStation block -0.25 0.25 -0.25 0.25 -0.1 0.1
create_box 100 simulationStation bond/types 100000 extra/bond/per/atom 100 angle/types 10000 extra/angle/per/atom 100
change_box	all boundary f f f

pair_style hybrid/overlay granular lj/cut 0
pair_coeff  * * granular hertz/material 0 0 0 tangential linear_nohistory 0 0
pair_coeff  * * lj/cut 0 0 0

special_bonds lj/coul 0 1.0 1.0
bond_style harmonic
angle_style cosine

bond_coeff * 0 0
angle_coeff * 0
fix integration all nve/sphere
neigh_modify page 500000 one 50000


### Here we will begin to include particles ###


include sheet_1.txt
set type 1 diameter 0.004
set type 1 density 0.5
bond_coeff 1 17.32050807568877 0.004010232884811608
include bonds_1.txt
angle_coeff 1 2.2222222222222225e-06
include angles_1.txt

group group_viscosity_1 type 1
fix fix_viscosity_1 group_viscosity_1 viscous 1e-05

include grains_1.txt
set type 2 diameter 0.01
set type 2 density 0.01

include grains_2.txt
set type 3 diameter 0.01
set type 3 density 0.01
pair_coeff 1 * granular hertz/material 1000 0 0.5 tangential linear_nohistory 0 0

group group_move_1 type 2
fix fix_move_1 group_move_1 move linear 0 0 -0.02

group group_move_2 type 3
fix fix_move_2 group_move_2 move linear 0 0 0.02

compute stress all stress/atom NULL
compute contacts all contact/atom
variable pressure atom 2*(c_stress[1]+c_stress[2]+c_stress[3])/(c_contacts+.001)
compute bendingE all pe/atom angle
compute stretchingE all pe/atom bond
dump pump all custom 1 out*.dump id type radius x y z fx fy fz v_pressure c_bendingE c_stretchingE
dump_modify pump pad 11

timestep 1e-06
dump_modify pump every 25000
run 500000
